#-----------------------------
#--- Model parameters
#-----------------------------

variable natom	equal 4000  #--- system size
#variable lx		equal 20.0  #--- system size
variable Ntype	equal 5		#--- number of atom types
variable a      equal 3.58   #--- lattice constant
variable Dt		equal 0.001 #--- discretization time
variable Tinit 	equal 300.0  #--- initial temperature
variable Tfinal equal 3000.0 #--- final temperature
variable tDampTemp 	equal 10*${Dt}   #--- thermostat equilibration time scale
variable Trate 	equal 50.0   #--- melting rate
variable Pinit	equal 1.0132  #--- number of time steps
variable Nfreq	equal 1  #--- number of time steps
variable tEquilibrate	equal 1000*${tDampTemp}  #--- equilibration time
variable tDampPress 	equal ${tDampTemp}   #--- barostat equilibration time scale

#-----------------------------
#--- Compute Variables
#-----------------------------
variable	nRunEquilibrate	equal	${tEquilibrate}/${Dt}
variable	tMelting		equal	(${Tfinal}-${Tinit})/${Trate}
variable	nRunMelting		equal	${tMelting}/${Dt}
#variable a		equal	${1/RHO^(1.0/3.0)} #--- lattice constant
variable lx		equal	${natom}^(1.0/3.0)*${a}/2.0^(1.0/6.0) #--- length

#-----------------------------
#--- system details
#-----------------------------
units		metal
atom_style	atomic
boundary	p p p

#-----------------------------
#--- read data file
#-----------------------------
#read_data       FeNi_glass_${initTemp}.data

#-----------------------------
#--- define box & lattice
#-----------------------------
lattice fcc ${a}
region mybox block 0.0 ${lx} 0.0 ${lx} 0.0 ${lx}
create_box ${Ntype} mybox


#-----------------------------
#--- assign particle types
#-----------------------------
#create_atoms 4  box ratio 0.5 7467  #--- seed
#create_atoms 2  box ratio 0.5 2465
#create_atoms 3 box ratio 0.2 524658
#create_atoms 4 box ratio 0.2 4658
#create_atoms 5 box ratio 0.2 9224658
#change_box all triclinic
#--- 2nd method
create_atoms    ${Ntype} box
group fe_group type ${Ntype}
set group fe_group type/fraction 4 0.5  940248
group ni_group type ${Ntype}
set group ni_group type 2

#neigh_modify delay 0
#neighbor    0.3 bin
#neigh_modify    delay 5

#-----------------------------
#--- interactions
#-----------------------------
#neigh_modify delay 0
pair_style meam/c
pair_coeff * * ${MEAM_library_DIR}/library_CoNiCrFeMn.meam Co Ni Cr Fe Mn ${MEAM_library_DIR}/parameters.meam Co Ni Cr Fe Mn

#--- print temperature
variable varPress equal press
variable varTemp equal temp
variable varStep equal step
#fix extra all print ${Nfreq} "${varStep} ${varTemp} ${varPress}" file temp.txt
fix extra all print ${Nfreq} "${a} ${varPress}" file temp.txt

#--- thermo
thermo	${Nfreq}
thermo_style	custom step ke pe press temp

#-----------------------------
#--- set dynamics
#-----------------------------
timestep ${Dt}

#fix	1	all nve
#--- initial equilibration
#fix		fix_initEq	all npt temp ${Tinit} ${Tinit} ${tDampTemp} iso ${Pinit} ${Pinit} ${tDampPress}
#run 	${nRunEquilibrate}

#--- melting
#unfix	fix_initEq
#fix		fix_melt	all npt temp ${Tinit} ${Tfinal} ${tDampTemp} iso ${Pinit} ${Pinit} ${tDampPress}
#run		${nRunMelting}


#--- final equilibration
#unfix	fix_melt
#fix		fix_finalEq	all npt temp ${Tfinal} ${Tfinal} ${tDampTemp} iso ${Pinit} ${Pinit} ${tDampPress}
#run 	${nRunEquilibrate}

#-----------------------------
#--- compute & dump variables
#-----------------------------
compute 	1 all stress/atom NULL pair
dump      1 all custom 1 xyz.dump id type x y z
#dump    11 all custom ${Nfreq} virialStress.xyz id type x y z #c_1[1] c_1[2] c_1[3] c_1[4] c_1[5] c_1[6] c_1[22]
#dump 2 all custom 10000 dump.NiFe_glass-${initTemp}-${srate}.unwrap id type xu yu zu
#variable strainxy equal "(xy)/v_L0y"
#variable  tmp3 equal "vol"
#variable Volume equal ${tmp3}
#compute		reducedstress all reduce sum c_1[22]
#compute		reducedstress2 all reduce sum c_1[4]
#variable	stress equal (c_reducedstress)/(${Volume})
#variable	stress2 equal (c_reducedstress2)/(${Volume})
#variable s1xy equal "v_stress"
#variable p1xy equal "v_strainxy"
#variable p1 equal "-pxy/10000"
#thermo_modify format line "%d %f %3.2e %3.2e"
#fix def1 all print 1 "${p1xy} ${p1} ${s1xy}" append NiFe_glass-${initTemp}-${srate}.txt

#fix 11 all box/relax iso 0.0 vmax 0.1
#min_style cg
#minimize 1.0e-8 1.0e-8 10000 100000

#-----------------------------
#--- run
#-----------------------------
run 0
