# Amin Esfandiarpour - Amin.esfandiarpour@ncbj.gov.pl- Am.esfandiyarpour@gmail.com

#--- set control parameters
variable initTemp equal 300          	# desired temperature
variable runTime equal 10000 #2000000   	# number of increment
#variable srate equal 1.0e-4
variable srate equal 1.0e-2
variable	NTHERMO		equal		100

#---
#log	     	shearCoNiFe_glass${initTemp}-${srate}.log
units		metal
atom_style	atomic
boundary	p p p
read_data       FeNi_glass_${initTemp}.data
mass 1 58.993
mass 2 58.6934
mass 3 51.9961
mass 4 55.845
mass 5 54.9380
neigh_modify delay 0
pair_style meam/c
pair_coeff * * library_CoNiCrFeMn.meam Co Ni Cr Fe Mn parameters.meam Co Ni Cr Fe Mn

# Store final cell length for strain calculations
variable tmp equal "lx"
variable L0x equal ${tmp}
variable tmpy equal "ly"
variable L0y equal ${tmpy}
variable tmpz equal "lz"
variable L0z equal ${tmpz}


######################################
# DEFORMATION

timestep 0.001
#fix 		1 all nvt/sllod temp ${initTemp} ${initTemp} 1
fix 		1 all nve
variable srate1 equal ${srate} #"v_srate / 1.0e12"
fix             2 all deform 1  xy erate ${srate1}  units box  remap v
compute 	1 all stress/atom NULL pair
#dump      1 all custom 1 NiFe_glass-${initTemp}-${srate}.dump id type x y z vx vy vz  meam_force.cpp ln.967: 15+6+1
dump    11 all custom ${NTHERMO} ${OUT_PATH}/virialStress.xyz id type x y z c_1[1] c_1[2] c_1[3] c_1[4] c_1[5] c_1[6] c_1[22]
dump_modify 11 flush yes format line "%d %d %4.3e %4.3e %4.3e %4.3e %4.3e %4.3e %4.3e %4.3e %4.3e %4.3e"
#dump 2 all custom 10000 dump.NiFe_glass-${initTemp}-${srate}.unwrap id type xu yu zu
variable strainxy equal "(xy)/v_L0y"
variable  tmp3 equal "vol"
variable Volume equal ${tmp3}

compute		reducedstress all reduce sum c_1[22]
variable	stress equal (c_reducedstress)/(${Volume})
variable s1xy equal "v_stress"
#variable p1xy equal "v_strainxy"
#variable p1 equal "-pxy/10000"
thermo ${NTHERMO}
thermo_style	custom step v_strainxy v_stress #ke pe press temp
thermo_modify format line "%d %f %4.3e"

#fix def1 all print 1 "${p1xy} ${p1} ${s1xy}" append NiFe_glass-${initTemp}-${srate}.txt
run ${runTime}


######################################
# SIMULATION DONE
print "All done"
